*Heading
** Job name: prism_100mmx500mm Model name: Model prism_100mmx500mm-edgeEle
*Preprint, echo=NO, model=NO, history=NO, contact=NO
**
** PARTS
**
*Part, name=Part-1
*USER ELEMENT,NODES=2,TYPE=U1,PROPERTIES=8,COORDINATES=3,VARIABLES=4,UNSYMM
11
*Node
1,-5.000000000000001,9.359280903528001,460.73473644221
2,-5.000000000000001,10.462869644167,476.73243096609
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*ELEMENT, TYPE=U1, ELSET=UEL
1,1278,907
2,795,1278
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*ELEMENT, TYPE=DC1D2, ELSET=VISUALIZATION
100001,1278,907
100002,795,1278
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*UEL PROPERTY, ELSET=UEL
1.000E-9,8.9E-10,2.15E+3,1.97E-14,6.1728E+4,0.0,0.0,17.28E+6
*End Part
**
**
** ASSEMBLY
**
*Assembly, name=Assembly
**
*Instance, name=Part-1-1, part=Part-1
**Section: Section-1
*Solid Section,elset=VISUALIZATION,material=Material-1
*End Instance
**
*NSET, NSET=AllNodes, instance=Part-1-1, generate
1, 8526, 1
*NSET, NSET=LeftNodes, instance=Part-1-1
914,915,920,921,1021,1022
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*NSET, NSET=RightNodes, instance=Part-1-1
912,913,918,919,1019,1020
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*NSET, NSET=BottomNodes, instance=Part-1-1
838,839,882,883,939,940
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*NSET, NSET=TopNodes, instance=Part-1-1
983,984,989,990,993,994
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*NSET, NSET=BackNodes, instance=Part-1-1
1,2,3,4,5,6
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*NSET, NSET=FrontNodes, instance=Part-1-1
7887,7888,7889,7890,7891,7892
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*End Assembly
*Amplitude, name=Amp-1, time=TOTAL TIME
0., 0., 1.728e5, 1., 8.64e5, 1.
**
** MATERIALS
**
*Material, name=Material-1
*Depvar
4
1, EPSILONV1, EPSILONV1
2, EPSILONV2, EPSILONV2
3, Vc1, Vc1
4, Vc2, Vc2
*Density
0.,
*User Material, constants=1, type=THERMAL
0.,
**
** PREDEFINED FIELDS
**
** Name: Predefined Field-1   Type: Temperature
*Initial Conditions, type=TEMPERATURE
AllNodes, 0.0
**
** ----------------------------------------------------------------
**
** STEP: Step-1
**
*Step, name=Step-1, nlgeom=NO, inc=500
*Heat Transfer, end=PERIOD
864, 4.32e5
**
** BOUNDARY CONDITIONS
**
** Name: BC-1 Type: Temperature
*Boundary
LeftNodes, 11, 11, 1.0
**Boundary
**RightNodes, 11, 11, 0.0
**
** OUTPUT REQUESTS
**
*Restart, write, frequency=0
**
** FIELD OUTPUT: F-Output-1
**
*Output, Field
*Node Output
NT
*Element Output, directions=NO
SDV
*End Step
