*Heading
** Job name: grasslDisk-fracture Model name: Model-grasslDisk-fracture
*Preprint, echo=NO, model=NO, history=NO, contact=NO
**
*PARAMETER
**
*******************************************************************************
**  Preallocated array for Multiphysics-LDPM parameters                      **
**  1. basic LDPM [69 params]:     parameters props ID: 1-69                 **
**  2. time scaling [11 params]:   parameters props ID: 70-80                **
**  3. thermal [5 params]:         parameters props ID: 81-85                **
**  4. shrinkage [5 params]:       parameters props ID: 86-90                **
**  5. poroelasticity [10 params]: parameters props ID: 91-100               **
**  6. high-temp [30 params]:      parameters props ID: 101-130              **
**  7. hydration [30 params]:      parameters props ID: 131-160              **
**  8. aging [30 params]:          parameters props ID: 161-190              **
**  9. creep [20 params]:          parameters props ID: 191-210              **
**  10. evap-water [30 params]:    parameters props ID: 211-240              **
**  11. ASR [30 params]:           parameters props ID: 241-270              **
**                                                                           **
*******************************************************************************
**                              [Basic LDPM]                                 **
**  1-Phase: General LDPM,  2-Phase: Not Used,  3-Phase: ITZ Prop.           **
**                             props ID: 1-23                                **
*******************************************************************************
**
Density1                            = 2.46e-9
ElasticModulus1                     = 46480.0
Alpha1                              = 0.5455
TensileStrength1                    = 2.1
TensileCharacteristicLength1        = 200.0
ShearStrengthRatio1                 = 4.1
SofteningExponent1                  = 0.2
CompressiveYieldingStrength1        = 100.0
InitialHardeningModulusRatio1       = 0.4
TransitionalStrainRatio1            = 4.0
DeviatoricStrainThresholdRatio1     = 1.0
DeviatoricDamageParameter1          = 5.0
InitialFriction1                    = 0.2
AsymptoticFriction1                 = 0.0
TransitionalStress1                 = 600.0
DensificationRatio1                 = 1.0
VolumetricDeviatoricCoupling1       = 0.0
TensileUnloading1                   = 0.0
ShearUnloading1                     = 0.0
CompressiveUnloading1               = 0.0
ShearSoftening1                     = 0.0
FinalHardeningModulusRatio1         = 0.1
ElasticAnalysisFlag1                = 0.0
**
*******************************************************************************
**                              [Basic LDPM]                                 **
**  1-Phase: Not Used,  2-Phase: Binder Prop.,  3-Phase: Binder Prop.        **
**                             props ID: 24-46                               **
*******************************************************************************
**
Density2                        =0
ElasticModulus2                 =0
Alpha2                          =0
TensileStrength2                =0
TensileCharacteristicLength2    =0
ShearStrengthRatio2             =0
SofteningExponent2              =0
CompressiveYieldingStrength2    =0
InitialHardeningModulusRatio2   =0
TransitionalStrainRatio2        =0
DeviatoricStrainThresholdRatio2 =0
DeviatoricDamageParameter2      =0
InitialFriction2                =0
AsymptoticFriction2             =0
TransitionalStress2             =0
DensificationRatio2             =0
VolumetricDeviatoricCoupling2   =0
TensileUnloading2               =0
ShearUnloading2                 =0
CompressiveUnloading2           =0
ShearSoftening2                 =0
FinalHardeningModulusRatio2     =0
ElasticAnalysisFlag2            =0
**
*******************************************************************************
**                              [Basic LDPM]                                 **
**  1-Phase: Not Used,  2-Phase: Aggregate Prop.,  3-Phase: Aggregate Prop.  **
**                             props ID: 47-69                               **
*******************************************************************************
**
Density3                        =0
ElasticModulus3                 =0
Alpha3                          =0
TensileStrength3                =0
TensileCharacteristicLength3    =0
ShearStrengthRatio3             =0
SofteningExponent3              =0
CompressiveYieldingStrength3    =0
InitialHardeningModulusRatio3   =0
TransitionalStrainRatio3        =0
DeviatoricStrainThresholdRatio3 =0
DeviatoricDamageParameter3      =0
InitialFriction3                =0
AsymptoticFriction3             =0
TransitionalStress3             =0
DensificationRatio3             =0
VolumetricDeviatoricCoupling3   =0
TensileUnloading3               =0
ShearUnloading3                 =0
CompressiveUnloading3           =0
ShearSoftening3                 =0
FinalHardeningModulusRatio3     =0
ElasticAnalysisFlag3            =0
**
**
*******************************************************************************
**                         [Time scaling]                                    **
**                        props ID: 70-80                                    **
*******************************************************************************
**
TimeScalingFlag                    = 1.0
TimeScalingFactor1                 = 9.0e6
TimeScalingFactor2                 = 0.0
TimeScalingFactor3                 = 0.0
TimeScalingFactor4                 = 0.0
TimeScalingFactor5                 = 0.0
**
TerminalTimeStep1                  = 0.0
TerminalTimeStep2                  = 0.0
TerminalTimeStep3                  = 0.0
TerminalTimeStep4                  = 0.0
TerminalTimeStep5                  = 0.0
**
*******************************************************************************
**                          [Thermal Model]                                  **
**                          props ID: 81-85                                  **
*******************************************************************************
**
ThermalStrainFlag                  = 0.0
ThermalCoefficent                  = 7.0e-6
LITSPoisson                        = 0.0
LITSCoefA                          = 0.0004
LITSCoefB                          = 0.001
**
*******************************************************************************
**                          [Shrinkage Model]                                **
**                           props ID: 86-90                                 **
*******************************************************************************
**
ShrinkageStrainFlag                = 0.0
ShrinkageCoefficent                = 1.0
ShrinkageParam2                    = 0.0
ShrinkageParam3                    = 0.0
ShrinkageParam4                    = 0.0
**
*******************************************************************************
**                          [Poroelasticity]                                 **
**                          props ID: 91-100                                 **
*******************************************************************************
**
ImposedStressFlag                  = 1.0
BiotCoefficient                    = 0.5
PoroElasParam2                     = 0.0
PoroElasParam3                     = 0.0
PoroElasParam4                     = 0.0
PoroElasParam5                     = 0.0
PoroElasParam6                     = 0.0
PoroElasParam7                     = 0.0
PoroElasParam8                     = 0.0
PoroElasParam9                     = 0.0
**
*******************************************************************************
**                      [High-temperature degradation]                       **
**                          props ID: 101-122                                **
*******************************************************************************
**
HTDegradationFlag                  = 0.0
**
E0startT                           = 100.0
E0meltT                            = 700.0
E0nd                               = 0.2
ftstartT                           = 220.0
ftmeltT                            = 1000.0
ftnd                               = 1.4
fsstartT                           = 50.0
fsmeltT                            = 1200.0
fsnd                               = -0.6
fcstartT                           = 300.0
fcmeltT                            = 1000.0
fcnd                               = 0.2
sf0startT                          = 300.0
sf0meltT                           = 1000.0
sf0nd                              = 0.2
**
HighTempParam16                    = 0.0
HighTempParam17                    = 0.0
HighTempParam18                    = 0.0
HighTempParam19                    = 0.0
HighTempParam20                    = 0.0
HighTempParam21                    = 0.0
*******************************************************************************
**                      [High-temperature DTemPor3]                          **
**                          props ID: 123-130                                **
*******************************************************************************
**
TemPorFlag                         = 0.0
WatContent                         = 0.0
CemContent                         = 0.0
InitialWe0                         = 0.0
HydrualicCond                      = 0.0
TempOnHC                           = 0.0
HeatCapacity                       = 0.0
ThermalCond                        = 0.0
**
*******************************************************************************
**               [Hydration and silica fume reactions]                       **
**   props ID: 131-Flag,132-148[basic],149-152[ONIX],153-155[HTC],156-160    **
*******************************************************************************
**
HydrationFlag                      = 0.0
WatertoCementRatio                 = 0.5
CementContent                      = 4.2e-10
HydrationReferenceTemperature      = 293.15
CementHydrationAc1                 = 4.53e-2
CementHydrationAc2                 = 1.0e-2
CementHydrationEtac                = 8.
CementHydrationEnergy              = 4.6e7
CementHydrationEnthalpy            = 5.2e11
InitialHydrationDegree             = 0.0
SilicaFumeContent                  = 0.0
SFReactionReferenceTemperature     = 293.15
SilicaFumeReactionAs1              = 1.1e-5
SilicaFumeReactionAs2              = 1.0e-6
SilicaFumeReactionEtac             = 9.5
SilicaFumeReactionEnergy           = 8.0e7
SilicaFumeReactionEnthalpy         = 7.8e11
InitialSFReactionDegree            = 0.0
**
SaturatedInfinityalphac            = 0.8888888
CementHydrationZeta                = 5.
SaturatedInfinityalphas            = 0.9999999
SilicaFumeReactionZeta             = 0.9
**
CementHydrationHumiditya           = 5.5
CementHydrationHumidityb           = 4.0
SilicaFumeEfficiency               = 0.9
**
HydrationParam25                   = 0.0
HydrationParam26                   = 0.0
HydrationParam27                   = 0.0
HydrationParam28                   = 0.0
HydrationParam29                   = 0.0
**
*******************************************************************************
**		               [Aging model]                                          **
**		               props ID: 161-190                                      **
*******************************************************************************
**
AgingFlag                          = 0.0
AgeingAlpha0                       = 0.15
AgeingALambda                      = 0.5
AgeingReferenceTemperature         = 293.15
AgeingTemperatureExponent          = 0.8
InitialAgingDegree                 = 0.0
RelativeInitialModulus             = 0.2
ModulusAgingCoefficient            = 1.16
RelativeInitialStrengtht           = 0.3
StrengthtAgingCoefficient          = 1.2
RelativeInitialStrengthc0          = 0.3
Strengthc0AgingCoefficient         = 1.2
RelativeInitialStrengthN0          = 0.3
StrengthN0AgingCoefficient         = 1.2
RelativeInitialRst                 = 0.4
RstAgingCoefficient                = 1.8
LtAgingParameter                   = 3.57
AgingParam17                       = 0.0
AgingParam18                       = 0.0
AgingParam19                       = 0.0
AgingParam20                       = 0.0
AgingParam21                       = 0.0
AgingParam22                       = 0.0
AgingParam23                       = 0.0
AgingParam24                       = 0.0
AgingParam25                       = 0.0
AgingParam26                       = 0.0
AgingParam27                       = 0.0
AgingParam28                       = 0.0
AgingParam29                       = 0.0
**
*******************************************************************************
**		               [Creep Model]                                          **
**		               props ID: 191-210                                      **
*******************************************************************************
**
CreepModelFlag                     = 1.0
MesoscaleInstantaneousComplianceq1 = 1.0
ViscoelasticXi1                    = 1.0
ViscoelasticN                      = 1.0
PurelyViscousKappa0                = 1.0
PurelyViscousKappa1                = 1.0
PurelyViscousXi2                   = 1.0
InitialRealTime                    = 3600.0
InitialMicroprestress              = 1.0
CreepTau0                          = -4.0
NKelvinChain                       = 10.0
CreepA0                            = 0.0
A0IntegrationTime                  = 10.0
DeltaTau                           = 0.0
CreepParam14                       = 0.0
CreepParam15                       = 0.0
CreepParam16                       = 0.0
CreepParam17                       = 0.0
CreepParam18                       = 0.0
CreepParam19                       = 0.0
**
*******************************************************************************
**		               [Evaporable water model                                **
**		               props ID: 211-240                                      **
*******************************************************************************
**
EvapWaterFlag                      = 0.0
EvapWaterParam1                    = 1.0
EvapWaterParam2		           = 0.0
EvapWaterParam3		           = 0.0
EvapWaterParam4		           = 0.0
EvapWaterParam5		           = 0.0
EvapWaterParam6		           = 0.0
EvapWaterParam7		           = 0.0
EvapWaterParam8		           = 0.0
EvapWaterParam9                    = 0.0
EvapWaterParam10                   = 0.0
EvapWaterParam11                   = 0.0
EvapWaterParam12                   = 0.0
EvapWaterParam13                   = 0.0
EvapWaterParam14                   = 0.0
EvapWaterParam15                   = 0.0
EvapWaterParam16                   = 0.0
EvapWaterParam17                   = 0.0
EvapWaterParam18                   = 0.0
EvapWaterParam19                   = 0.0
EvapWaterParam20                   = 0.0
EvapWaterParam21                   = 0.0
EvapWaterParam22                   = 0.0
EvapWaterParam23                   = 0.0
EvapWaterParam24                   = 0.0
EvapWaterParam25                   = 0.0
EvapWaterParam26                   = 0.0
EvapWaterParam27                   = 0.0
EvapWaterParam28                   = 0.0
EvapWaterParam29                   = 0.0
**
*******************************************************************************
**		               [Alkali silica reaction Model]                         **
**		               props ID: 241-270                                      **
*******************************************************************************
**
AlkaliSilicaReactionFlag           = 0.0
ASRReferenceTemperature            = 1.0
AlkaliDiffusionCoeffiecentCz10     = 1.0
AlkaliDiffusionRatioCz1OverCz0     = 1.0
AlkaliDiffusionExponentnZ          = 1.0
AlkaliDiffusionEnergyEag           = 1.0
AlkaliContentCoefficientkappaa     = 1.0
SilicaContentCs                    = 1.0
BulkDiffusionCoefficientCw10       = 1.0
BulkDiffusionRatioCw1OverCw0       = 1.0
BulkDiffusionExponentnw            = 1.0
BulkDiffusionEnergyEaw             = 1.0
WaterImbibitionCoefficientbetaw10  = 1.0
TemperatureDependentkappaT         = 1.0
HumidityDependentkappah            = 1.0
ASRParam15                         = 0.0
ASRParam16                         = 0.0
ASRParam17                         = 0.0
ASRParam18                         = 0.0
ASRParam19                         = 0.0
ASRParam20                         = 0.0
ASRParam21                         = 0.0
ASRParam22                         = 0.0
ASRParam23                         = 0.0
ASRParam24                         = 0.0
ASRParam25                         = 0.0
ASRParam26                         = 0.0
ASRParam27                         = 0.0
ASRParam28                         = 0.0
ASRParam29                         = 0.0
**
**
*******************************************************************************
**                             Other parameters                              **
**                              jprops ID: 1                                 **
*******************************************************************************
**
NumberOfUserElement                =23958
**
** PARTS
**
*Part, name=grasslDisk-fracture
*USER ELEMENT, NODES=4, TYPE=VU4, COORDINATES=3, variables=900, PROPERTIES=270, I PROPERTIES=1, INTEGRATION=3
1, 2, 3, 4, 5, 6
*Node
1, 0.0, 100.0, 725.0
2, 0.0, 100.0, 100.0
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*Element, type=VU4, elset=AllEls
1, 2011, 4140, 4499, 4601
2, 5211, 2069, 4457, 3708
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*Element, type=S3R
23959,  118, 3161, 3170
23960,  254, 3178, 3165
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*UEL PROPERTY, ELSET=AllEls
<Density1>, <ElasticModulus1>, <Alpha1>, <TensileStrength1>, <TensileCharacteristicLength1>, <ShearStrengthRatio1>, <SofteningExponent1>, <CompressiveYieldingStrength1>,
<InitialHardeningModulusRatio1>, <TransitionalStrainRatio1>, <DeviatoricStrainThresholdRatio1>, <DeviatoricDamageParameter1>, <InitialFriction1>, <AsymptoticFriction1>, <TransitionalStress1>, <DensificationRatio1>,
<VolumetricDeviatoricCoupling1>, <TensileUnloading1>, <ShearUnloading1>, <CompressiveUnloading1>, <ShearSoftening1>, <FinalHardeningModulusRatio1>, <ElasticAnalysisFlag1>, <Density2>,
<ElasticModulus2>, <Alpha2>, <TensileStrength2>, <TensileCharacteristicLength2>, <ShearStrengthRatio2>, <SofteningExponent2>, <CompressiveYieldingStrength2>, <InitialHardeningModulusRatio2>,
<TransitionalStrainRatio2>, <DeviatoricStrainThresholdRatio2>, <DeviatoricDamageParameter2>,  <InitialFriction2>, <AsymptoticFriction2>, <TransitionalStress2>, <DensificationRatio2>, <VolumetricDeviatoricCoupling2>,
<TensileUnloading2>, <ShearUnloading2>, <CompressiveUnloading2>, <ShearSoftening2>, <FinalHardeningModulusRatio2>, <ElasticAnalysisFlag2>, <Density3>, <ElasticModulus3>,
<Alpha3>, <TensileStrength3>, <TensileCharacteristicLength3>, <ShearStrengthRatio3>, <SofteningExponent3>, <CompressiveYieldingStrength3>, <InitialHardeningModulusRatio3>, <TransitionalStrainRatio3>,
<DeviatoricStrainThresholdRatio3>, <DeviatoricDamageParameter3>, <InitialFriction3>, <AsymptoticFriction3>, <TransitionalStress3>, <DensificationRatio3>, <VolumetricDeviatoricCoupling3>, <TensileUnloading3>,
<ShearUnloading3>, <CompressiveUnloading3>, <ShearSoftening3>, <FinalHardeningModulusRatio3>, <ElasticAnalysisFlag3>, <TimeScalingFlag>, <TimeScalingFactor1>, <TimeScalingFactor2>,
<TimeScalingFactor3>, <TimeScalingFactor4>, <TimeScalingFactor5>, <TerminalTimeStep1>, <TerminalTimeStep2>, <TerminalTimeStep3>, <TerminalTimeStep4>, <TerminalTimeStep5>,
<ThermalStrainFlag>, <ThermalCoefficent>, <LITSPoisson>, <LITSCoefA>, <LITSCoefB>, <ShrinkageStrainFlag>, <ShrinkageCoefficent>, <ShrinkageParam2>,
<ShrinkageParam3>, <ShrinkageParam4>, <ImposedStressFlag>, <BiotCoefficient>, <PoroElasParam2>, <PoroElasParam3>, <PoroElasParam4>, <PoroElasParam5>,
<PoroElasParam6>, <PoroElasParam7>, <PoroElasParam8>, <PoroElasParam9>, <HTDegradationFlag>, <E0startT>, <E0meltT>, <E0nd>,
<ftstartT>, <ftmeltT>, <ftnd>, <fsstartT>, <fsmeltT>, <fsnd>, <fcstartT>, <fcmeltT>,
<fcnd>, <sf0startT>, <sf0meltT>, <sf0nd>, <HighTempParam16>, <HighTempParam17>, <HighTempParam18>, <HighTempParam19>,
<HighTempParam20>,<HighTempParam21>,<TemPorFlag>, <WatContent>, <CemContent>,<InitialWe0>, <HydrualicCond>, <TempOnHC>,
<HeatCapacity>,<ThermalCond>,<HydrationFlag>, <WatertoCementRatio>, <CementContent>, <HydrationReferenceTemperature>, <CementHydrationAc1>, <CementHydrationAc2>,
<CementHydrationEtac>, <CementHydrationEnergy>, <CementHydrationEnthalpy>, <InitialHydrationDegree>, <SilicaFumeContent>, <SFReactionReferenceTemperature>, <SilicaFumeReactionAs1>, <SilicaFumeReactionAs2>,
<SilicaFumeReactionEtac>, <SilicaFumeReactionEnergy>, <SilicaFumeReactionEnthalpy>, <InitialSFReactionDegree>, <SaturatedInfinityalphac>, <CementHydrationZeta>, <SaturatedInfinityalphas>, <SilicaFumeReactionZeta>,
<CementHydrationHumiditya>, <CementHydrationHumidityb>, <SilicaFumeEfficiency>, <HydrationParam25>, <HydrationParam26>, <HydrationParam27>, <HydrationParam28>, <HydrationParam29>,
<AgingFlag>, <AgeingAlpha0>, <AgeingALambda>, <AgeingReferenceTemperature>, <AgeingTemperatureExponent>, <InitialAgingDegree>, <RelativeInitialModulus>, <ModulusAgingCoefficient>,
<RelativeInitialStrengtht>,<StrengthtAgingCoefficient>, <RelativeInitialStrengthc0>, <Strengthc0AgingCoefficient>, <RelativeInitialStrengthN0>, <StrengthN0AgingCoefficient>, <RelativeInitialRst>, <RstAgingCoefficient>,
<LtAgingParameter>, <AgingParam17>, <AgingParam18>, <AgingParam19>, <AgingParam20>, <AgingParam21>, <AgingParam22>, <AgingParam23>,
<AgingParam24>, <AgingParam25>, <AgingParam26>, <AgingParam27>, <AgingParam28>, <AgingParam29>, <CreepModelFlag>, <MesoscaleInstantaneousComplianceq1>,
<ViscoelasticXi1>, <ViscoelasticN>, <PurelyViscousKappa0>, <PurelyViscousKappa1>, <PurelyViscousXi2>, <InitialRealTime>, <InitialMicroprestress>, <CreepTau0>,
<NKelvinChain>, <CreepA0>, <A0IntegrationTime>, <DeltaTau>, <CreepParam14>, <CreepParam15>, <CreepParam16>, <CreepParam17>,
<CreepParam18>, <CreepParam19>, <EvapWaterFlag>, <EvapWaterParam1>, <EvapWaterParam2>, <EvapWaterParam3>, <EvapWaterParam4>, <EvapWaterParam5>,
<EvapWaterParam6>, <EvapWaterParam7>, <EvapWaterParam8>, <EvapWaterParam9>, <EvapWaterParam10>, <EvapWaterParam11>, <EvapWaterParam12>, <EvapWaterParam13>,
<EvapWaterParam14>, <EvapWaterParam15>, <EvapWaterParam16>, <EvapWaterParam17>, <EvapWaterParam18>, <EvapWaterParam19>, <EvapWaterParam20>, <EvapWaterParam21>,
<EvapWaterParam22>, <EvapWaterParam23>, <EvapWaterParam24>, <EvapWaterParam25>, <EvapWaterParam26>, <EvapWaterParam27>, <EvapWaterParam28>, <EvapWaterParam29>,
<AlkaliSilicaReactionFlag>, <ASRReferenceTemperature>, <AlkaliDiffusionCoeffiecentCz10>, <AlkaliDiffusionRatioCz1OverCz0>, <AlkaliDiffusionExponentnZ>, <AlkaliDiffusionEnergyEag>, <AlkaliContentCoefficientkappaa>,<SilicaContentCs>,
<BulkDiffusionCoefficientCw10>, <BulkDiffusionRatioCw1OverCw0>, <BulkDiffusionExponentnw>, <BulkDiffusionEnergyEaw>, <WaterImbibitionCoefficientbetaw10>, <TemperatureDependentkappaT>, <HumidityDependentkappah>, <ASRParam15>,
<ASRParam16>, <ASRParam17>, <ASRParam18>, <ASRParam19>, <ASRParam20>, <ASRParam21>, <ASRParam22>, <ASRParam23>,
<ASRParam24>, <ASRParam25>, <ASRParam26>, <ASRParam27>, <ASRParam28>, <ASRParam29>, <NumberOfUserElement>
*Elset, elset=InnerSkin, internal, generate
 23959,  24080,      1
*Surface, type=ELEMENT, name=APPLYPRESSURE
InnerSkin, SPOS
** Section: Section-1-InnerSkin
*Shell Section, elset=InnerSkin,material=Skin,offset=SNEG
5, 5
*End Part
**
**
** ASSEMBLY
**
*Assembly, name=Assembly
**
*Instance, name=grasslDisk-fracture-1, part=grasslDisk-fracture
*End Instance
**
*Nset, nset=AllLDPMnodes, instance=grasslDisk-fracture-1, generate
1, 5367, 1
*NSET, NSET=InnerNodes_LDPM, instance=grasslDisk-fracture-1
2,4,121,123,124,125
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*NSET, NSET=OuterNodes_LDPM, instance=grasslDisk-fracture-1
1,3,9,10,14,16
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*NSET, NSET=TopNodes_LDPM, instance=grasslDisk-fracture-1
1,2,5,6,7,8
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*NSET, NSET=BottomNodes_LDPM, instance=grasslDisk-fracture-1
3,4,133,134,135,136
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*NSET,NSET=MonitoringNodes-1_LDPM, instance=grasslDisk-fracture-1
738,872,873,1294,1295,1353
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*Surface, type=NODE, name=grasslDisk_inner_CNS_, internal
InnerNodes_LDPM
*End Assembly
*Amplitude, name=Amp-1, time=TOTAL TIME
0., 0., 1.0e-2, 1., 5.0e-2, 1.
**
** MATERIALS
**
*Material, name=Skin
*Density
<Density1>,
*Elastic
37185.02, 0.1
**
** BOUNDARY CONDITIONS
**
** Name: BC-Fixed Type: Displacement/Rotation
**Boundary
TopNodes_LDPM, 2, 2
TopNodes_LDPM, 4, 6
BottomNodes_LDPM, 2, 2
BottomNodes_LDPM, 4, 6
** ----------------------------------------------------------------
**
** STEP: Step-1
**
*Step, name=Step-1, nlgeom=NO
*Dynamic, Explicit, DIRECT USER CONTROL
5.0e-7, 5.0e-2
*Bulk Viscosity
0.06, 1.2
**
** LOADS
**
** Name: SURFFORCE-1   Type: Pressure
*Dsload, amplitude=Amp-1
grasslDisk-fracture-1.APPLYPRESSURE, P, 20.
**
** OUTPUT REQUESTS
**
** FIELD OUTPUT: F-Output-1
**
*Output, Field, Var=Preselect, Number interval=100
*Node Output, Nset=AllLDPMNodes
U, V, A, RF
*End Step
